# [plot: -x^2 vs x]
# Problem 1-1
f(x) := -x^2
d/dx(f(x)) → -(2*x)
# The function is NOT eventually nondecreasing
# [plot: x^2 + 2*x + 1 vs x]
# Problem 1-2
f(x) := x^2 + 2*x + 1
d/dx(f(x)) → 2*x + 2
# The function is eventually nondecreasing
# [plot: x^3 + x vs x]
# Problem 1-3
f(x) := x^3 + x
d/dx(f(x)) → 3*x^2 + 1
# The function is eventually nondecreasing
